*Heading
** Job name: enhanced Model name: Model-1
** Generated by: Abaqus/CAE 2020
*Preprint, echo=NO, model=NO, history=NO, contact=NO
**
** PARTS
**
*Part, name=Part-1
*Node
      1,  0.200000003,          0.5
      2,          0.5,          0.5
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*Element, type=CPS3
 1, 16, 17, 76
 2, 17, 77, 76
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*Nset, nset=Set-4, generate
   1,  139,    1
*Elset, elset=Set-4, generate
   1,  240,    1
*Nset, nset=left
  6,  8, 12, 36, 37, 38, 39, 62, 63, 64
*Nset, nset=right
  9, 10, 13, 53, 54, 55, 72, 73, 74, 75
*Elset, elset=enhance
   1,   2,   3,   4,   5,   6
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** Section: Section-1
*Solid Section, elset=enhance, material=Material-1
,
** Region: (Section-1:Set-4)
*Elset, elset=_I2, internal, generate
  67,  218,    1
** Section: Section-1
*Solid Section, elset=_I2, material=Material-1
,
*End Part
**
**
** ASSEMBLY
**
*Assembly, name=Assembly
**
*Instance, name=Part-1-1, part=Part-1
*End Instance
**
*End Assembly
**
** MATERIALS
**
*Material, name=Material-1
** ----------------------------------------------------------------
**
** STEP: Step-1
**
*Step, name=Step-1, nlgeom=NO
*Static
1., 1., 1e-05, 1.
**
** OUTPUT REQUESTS
**
*Restart, write, frequency=0
**
** FIELD OUTPUT: F-Output-1
**
*Output, field, variable=PRESELECT
**
** HISTORY OUTPUT: H-Output-1
**
*Output, history, variable=PRESELECT
*End Step
