*Heading
** Job name: Job-1 Model name: Model-1
** Generated by: Abaqus/CAE 2020
*Preprint, echo=NO, model=NO, history=NO, contact=NO
**
** PARTS
**
*Part, name=Part-1
*Node
      1,           0.,           0.
      2,  0.100000001,           0.
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*Element, type=CPS3
  1,   1,   2,  13
  2,  13,  12,   1
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*Nset, nset=Set-2, generate
   1,  121,    1
*Elset, elset=Set-2, generate
   1,  200,    1
** Section: Section-1
*Solid Section, elset=Set-2, material=Material-1
,
*End Part
**
**
** ASSEMBLY
**
*Assembly, name=Assembly
**
*Instance, name=Part-1-1, part=Part-1
*End Instance
**
*Elset, elset=textregion, instance=Part-1-1
   1,   2,   5,   8,  15,  16
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*End Assembly
**
** MATERIALS
**
*Material, name=Material-1
*Elastic
10., 0.3
